*Heading
** Job name: Strip1_Umat7_Fld Model name: Strip1_Umat7_Fld
** Generated by: Abaqus/CAE 2022
*Preprint, echo=NO, model=NO, history=NO, contact=NO
**
** PARTS
**
*Part, name=Strip
*Node
      1,           0.,           0.
      2, 0.0215061717,           0.
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*Element, type=CPS4T
    1,     1,     2,   469,   468
    2,     2,     3,   470,   469
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*Nset, nset=_PickedSet32, internal, generate
     1,  33157,      1
*Elset, elset=_PickedSet32, internal, generate
     1,  32620,      1
** Section: Plan_Str
*Solid Section, elset=_PickedSet32, material=Umat_Mult
3.,
*End Part
**
**
** ASSEMBLY
**
*Assembly, name=Assembly
**
*Instance, name=Strip-1, part=Strip
*End Instance
**
*Nset, nset=_PickedSet25, internal, instance=Strip-1, generate
     1,  32691,    467
*Elset, elset=_PickedSet25, internal, instance=Strip-1, generate
     1,  32155,    466
*Nset, nset=_PickedSet29, internal, instance=Strip-1
 1,
*Nset, nset=_PickedSet30, internal, instance=Strip-1, generate
     1,  33157,      1
*Elset, elset=_PickedSet30, internal, instance=Strip-1, generate
     1,  32620,      1
*Nset, nset=_PickedSet31, internal, instance=Strip-1, generate
   467,  33157,    467
*Elset, elset=_PickedSet31, internal, instance=Strip-1, generate
   466,  32620,    466
*End Assembly
*Amplitude, name=Amp-1
             0.,              0.,           3800.,              1.,           4000.,              1.
**
** MATERIALS
**
*Material, name=Umat_Mult
*Conductivity
 0.0225,
*Density
 1e-09,
*Depvar
      5,
*Specific Heat
 1e+09,
*User Material, constants=7
 1408.4,     1.1,  685.66, -1502.8,  5325.7, -30256.,  38960.
**
** BOUNDARY CONDITIONS
**
** Name: Constraint Type: Displacement/Rotation
*Boundary
_PickedSet25, 1, 1
** Name: Pin Type: Symmetry/Antisymmetry/Encastre
*Boundary
_PickedSet29, PINNED
**
** PREDEFINED FIELDS
**
** Name: Predefined Field-1   Type: Temperature
*Initial Conditions, type=TEMPERATURE
_PickedSet30, 0.
** ----------------------------------------------------------------
**
** STEP: Step-1
**
*Step, name=Step-1, nlgeom=YES, inc=1000000
*Coupled Temperature-displacement, creep=none, steady state
0.1, 4000., 0.00001, 7.
**
** BOUNDARY CONDITIONS
**
** Name: Load Type: Displacement/Rotation
*Boundary, amplitude=Amp-1
_PickedSet31, 1, 1, 4.
**
** OUTPUT REQUESTS
**
*Restart, write, frequency=0
**
** FIELD OUTPUT: F-Output-1
**
*Output, field, frequency=10
*Node Output
CF, RF, U
*Element Output, directions=YES
E, LE, MISES, NE, S, SDV
**
** HISTORY OUTPUT: H-Output-1
**
*Output, history, frequency=10
*Energy Output
*End Step
